# AguaClara Water Treatment Plants
# Automated Design
# User Inputs:
# Design References
# [reference: UserInputs-sestest.xmcd]
# [reference: DesignAssumptions-sestest.xmcd]
# [reference: MathFunctions.xmcd]
# [reference: PipeDatabase.xmcd]
# [reference: MinorLossCoefficients.xmcd]
# [reference: FluidsFunctions.xmcd]
# [reference: Channel.xmcd]
W_Channel = 0.244687 m
L_Channel = 3.45 m
ND_SedPipeEntrance = 6 in
# [reference: Sedimentation-sestest.xmcd]
H_SedBelowSlope = 0.5 m
H_SedBelowStraight = 0 m
H_SedAbove = 0.12 m
H_SedPlate = 0.38 m
HW_Sed = 1 m
H_Sed = 1.1 m
Z_Mp = 0.4 m
L_Sed = 3.02137 m
L_SedPlate = 0.438786 m  # Length of tank occupied by plate settlers (not including angled section)
N_SedPlates = 79
V_SedC = 9.97725 m/day
V_SedUp = 63.5473 m/day
# [reference: FCM.xmcd]
N_Fcm = 1
ID_FcmTube = 0.125 in
ID_FcmTube = 3.175 mm
L_FcmTube = 94.1094 cm
Q_FcmTubeMax = 300 mL/min
HL_FcmValve = 6.63656 cm
# [reference: Flocculation.xmcd]
W_FlocChannel = 0.5 m
S_FlocBaffle = [0.0896221; 0.126745; 0.264906] m
B_FlocBaffle = [0.109622; 0.146745; 0.284906] m
N_FlocBafflesMin = 36
HL_Floc = 6.55881 cm
X_FlocBaffles = [
    0.2286, 2.74146;
    0.338222, 2.59472;
    0.447844, 2.44797;
    0.557466, 2.30123;
    0.667089, 2.01632;
    0.776711, 1.73142;
    0.886333, 1.44651;
    0.995955, 1.1616;
    1.10558, 0.876696;
    1.2152, 0.591789;
    1.32482, 0.306883;
    1.43444, 0;
    1.58119, 0;
    1.72793, 0;
    1.87468, 0;
    2.02142, 0;
    2.16817, 0;
    2.31491, 0;
    2.46166, 0;
    2.6084, 0
] m
HW_FlocStart = 1.06559 m
W_FlocPort = 0.264906 m
L_FlocBaffles = [
    0.865567, 0.809883;
    1.03115, 0.975471;
    0.865567, 0.809883;
    1.03115, 0.975471;
    0.865567, 0.60264;
    1.03115, 0.768228;
    0.865567, 0.60264;
    1.03115, 0.768228;
    0.865567, 0.60264;
    1.03115, 0.768228;
    0.865567, 0.60264;
    1.03115, 0;
    0.809883, 0;
    0.975471, 0;
    0.809883, 0;
    0.975471, 0;
    0.809883, 0;
    0.975471, 0;
    0.809883, 0;
    0.975471, 0
] m
H_FlocPort = 0.75 m
N_FlocBaffles = 31
Z_FlocBaffles = [
    0, 0;
    0.134433, 0.190117;
    0, 0;
    0.134433, 0.190117;
    0, 0;
    0.134433, 0.39736;
    0, 0;
    0.134433, 0.39736;
    0, 0;
    0.134433, 0.39736;
    0, 0;
    0.134433, 0;
    0, 0;
    0.190117, 0;
    0, 0;
    0.190117, 0;
    0, 0;
    0.190117, 0;
    0, 0;
    0.190117, 0
] m
Gt_FlocMinFlow = 4384.06
# [reference: EntranceTank.xmcd]
ND_Lfom = 6 in
HL_Rm = 4.65629 cm
N_Lfom = 2
D_LfomOrifices = 13 mm
N_LfomOrifices = [5; 5; 3; 2; 2; 2; 2; 1; 2; 1]
Q_LfomErrorMax = 0.763624 %
L_Et = 1.04775 m
W_Et = 1.04775 m
HW_Et = 1.2044 m
H_Et = 1.3044 m
# [reference: Launder.xmcd]
N_SedLaunderOrifices = 8
Q_SedLaunderOrifices = 16.6667 L/min
Z_SedLaunder = 0.94 m
ND_SedLaunder = 4 in
D_SedLaunderOrifice = 22 mm
# [reference: PlantLevelTank.xmcd]
HW_Plt = 0.5 m
ND_PltWeir = 0.1524 m
H_PltWeir = 0.4609 m
H_Plt = 0.7 m
W_Plt = 0.2564 m
# [reference: SludgeDrain.xmcd]
N_SedSludgeOrifices = 30
ND_SedSludge = 2 in
Q_SludgeDrainInitial = 201.425 L/min
D_SedSludgeOrifice = 6 mm
# Any additional needed elevations should be calculated in the files above.
# AutoCAD References
H_Channel := .3 m
W_EChannel := W_Channel
L_Floc := 9.059 m
H_EChannel := H_Channel
T_EChannelWall := T_ChannelWall
H_Floc := H_Sed
baffle_amp := .5 in
baffle_thick := 4 mm
baffle_slope := 90 deg
baffle_width := W_FlocChannel
baffle_col := 1  # this is a constant!
baffle_periods := 8.5
baffle_y := 7 cm
baffle_num := 1
baffle_x := 4 in
# [reference: basics.xmcd]
# [reference: pipe.xmcd]
# [reference: tank.xmcd]
# [reference: lamina.xmcd]
# [reference: cross.xmcd]
# [reference: Tee.xmcd]
# [reference: elbow.xmcd]
# [reference: Sludge.xmcd]
# [reference: Channel.xmcd]
# [reference: Manifold.xmcd]
# [reference: SedTankslopes.xmcd]
# [reference: SedTank.xmcd]
# [component: inputs SedTank]
# [reference: floctank.xmcd]
# [component: inputs FlocTank]
# [reference: EntranceTank.xmcd]
# [reference: platform.xmcd]
# [reference: alumstock.xmcd]
# [reference: PlantLevelTank.xmcd]
# [reference: chlorinestock.xmcd]
