# AguaClara Water Treatment Plants
# Automated Design
# References
# Here we will reference the subprograms: Unit Processes, Hydraulic Design, AutoCAD?, and Report Generator?. In order to be able to transfer data from one subprogram to another we will need to be able to send and recieve everything through function calls.
# [reference: HydraulicDesign.xmcd]
# [reference: UnitProcesses.xmcd]
# User Inputs:
# Choose either a Pipe Schedule Number or an SDR rating:
# [component: outputs PipeSpecification]
# Engineer Entered Values:
Q_plant := 740*L/min
# Values used to Draw Plant:
tank_thick := 20 cm
# floc tank parameters
lvltank_thick := 20 cm
n_channels := 2
stockplat_thick := lvltank_thick
grit_thick := lvltank_thick
FlocTank_width := .8 m
platform_thick := .5 m
β := 45 deg
# sed tank parameters
channel_thick := 10 cm
SedTank_width := 100 cm  # Width of the lamella
walkway_width := 1 m
L_lamella := 80 cm  # length of the lamella
lamella_spacing := 5 cm  # lamella spacing
# grit chamber parameters
DrillSize := 1/4*in  # Diameter of drill used for orifices in grit chamber riser pipe
# Calls Functions Here:
# Sedimentation Tank Design
# This file returns:
# 1st column: length of the sedimentation tank, width of the sedimentation tank, height of the sedimentation tank + freeboard.
# 2nd column: Number of lamella
SedTank := SedTankDesign(Q_plant, SedTank_width, lamella_spacing, L_lamella, β) = [[3.952; 1; 2.14282], 61.5224]
# Flocculator Design
# Flocculation File returns:
# 1st column: Floc tank dimensions: Height, Width, Length
# 2nd Column: baffle spacing in each section
# 3rd column:Floc inlet
# 4th column: Number of baffles in each section
Flocculator := flocculator(Q_plant, FlocTank_width, n_channels) = [[2; 0.8; 1.9], [0.396254; 0.228752; 0.177191], 1.5, [1; 1; 1]]
# Chemical Feed Design
FeedDesign := ChemicalFeed(Q_plant) = 370 mL/min
# Launderer Design
[SedPipe_length/m, D_orifice/m, orifice_dist/m, manifold_depth/m, D_launder/m, n_orifices]
Laund := Launder(Q_plant, PipeSpecification, SedTank[:, 0][0][0]*m) = [3.952, 0.00674977, 0.025, 0.1, 0.108204, 39]
# Sludge Pipe Design
SludgePipe := Sludge(Q_plant, PipeSpecification, SedTank[:, 0][0][0]*m) = [[0.0077978; 0.010414; 0.013843; 0.0171196; 0.0224536; 0.0278638; 0.0366268; 0.0427228; 0.0547878; 0.066929; 0.082804; 0.108204; 0.134493; 0.161468; 0.211557; 0.264668; 0.314706; 0.3429; 0.3937; 0.4445; 0.4953; 0.5969], 0.00676152, 0.1] m
# Channel Design
Channel_dim := Channel(Q_plant, SedTank_width, tank_thick) = [3.4; 0.3; 1.04059] m
# Grit Chamber Design
Grit := gritchamber(Q_plant, DrillSize, r_drum, PipeSpecification) = [[0.531736; 1.13174; 2], 3, [31; 154; 25; 31; 29; 27; 25; 24; 22; 20], 0.134493, 0.00635]
# Plant Leveling Tank
PLT := PlantLevelingTank(Q_plant, PipeSpecification) = [3, 3, [2; 2; 2], 5, 0.2]
# Constructing Table:
headerrow := ["Parameter"; "Value"; "Units"]
Units := [" "; " meter"; "meter"]
headercolumn := ["Number of Sedimentation Tanks"; "Lamella Spacing in Sedimentation Tank"; "Number of Lamella in Sedimenation Tank"]
Z := [n_sedtanks; lamella_spacing/m; SedTank[:, 1][0]]
length(headercolumn) = 3
length(Z) = 3
table(headerrow, headercolumn, Z) :=
    for i ∈ 0 .. length(headercolumn)
        for j ∈ 0 .. last(headerrow)
            table[i, j] ← headerrow[j] if i == 0
            otherwise
                table[i, j] ← headercolumn[i - 1] if j == 0
                table[i, j] ← Z[i - 1] if j == 1
                table[i, j] ← Units[i - 1] if j == 2
    return table
headercolumn_Dim := [" Sedimentation Tank"; "Dimensions of Flocculator"; "Dimensions of Grit Chamber"; "Dimensions of Leveling Tank"; "Dimensions of Channel"]
headerrow_Dim := ["Component"; "Length"; "Width"; "Height"; "Units"]
Dim_y := [SedTank[:, 0][0][1]; Flocculator[:, 0][0][1]; Grit[:, 0][0][1]; PLT[:, 2][0][1]; Channel_dim[1]/m]
Dim_z := [SedTank[:, 0][0][2]; Flocculator[:, 0][0][1]; Grit[:, 0][0][2]; PLT[:, 2][0][2]; Channel_dim[2]/m]
Dim_x := [SedTank[:, 0][0][0]; Flocculator[:, 0][0][0]; Grit[:, 0][0][0]; PLT[:, 2][0][0]; Channel_dim[0]/m]
Units2 := ["meter"; "meter"; "meter"; "meter"; "meter"]
tableDim(headerrow_Dim, headercolumn_Dim, Dim_x, Dim_y, Dim_z, Units2) :=
    for i ∈ 0 .. length(headercolumn_Dim)
        for j ∈ 0 .. last(headerrow_Dim)
            tableDim[i, j] ← headerrow_Dim[j] if i == 0
            otherwise
                tableDim[i, j] ← headercolumn_Dim[i - 1] if j == 0
                tableDim[i, j] ← Dim_x[i - 1] if j == 1
                tableDim[i, j] ← Dim_y[i - 1] if j == 2
                tableDim[i, j] ← Dim_z[i - 1] if j == 3
                tableDim[i, j] ← Units2[i - 1] if j == 4
    return tableDim
# Table of Parameters:
# top
# [component: inputs table(headerrow, headercolumn, Z)]
# [component: inputs tableDim(headerrow_Dim, headercolumn_Dim, Dim_x, Dim_y, Dim_z, Units2)]
